<?xml version="1.0"?>
<?xml-stylesheet href="http://jsbsim.sourceforge.net/JSBSim.xsl" type="text/xsl"?>
<fdm_config name="SR-71" version="2.0" release="BETA"
 xmlns:xsi="http://www.w3.org/2001/XMLSchema-instance"
 xsi:noNamespaceSchemaLocation="http://jsbsim.sourceforge.net/JSBSim.xsd">

    <fileheader>
        <author> Author Name </author>
        <filecreationdate> 2005-24-06</filecreationdate>
        <version> 0.1 </version>
        <description> Models a SR-71 </description>
        <documentation>
            Manufacturer: Lockheed Aircraft Corporation
            Length:107' 5"
            Length of Nose Probe:4' 11"
            Wing Span:55' 7"
            Wing Area:1,795 ft. sq.
            Wing Aspect Ratio:1.939
            Wing Root Chord:60.533
            Wing Dihedral Angle:0 degrees
            Wing Chord:0.00
            Wing Sweep:52.629 degrees
            Inboard Elevon Area:39.00 ft. sq.
            Outboard Elevon Area:52.50 ft. sq.
            Total Vertical Rudder Area:150.76 ft. sq.
            Moveable Rudder Area:70.24 ft. sq.
            Rudder Root Chord:14.803 ft.
            Rudder Tip Chord:7.833 ft.
            Height:18' 6"
            Empty Weight:59,000 lbs.
            Maximum Weight:170,000 lbs.
            Fuselage Diameter:5.33 ft.
            Service Ceiling:85,000'+
            Maximum Speed:Mach 3.3+ (Limit CIT of 427 degrees C)
            Cruising Speed:Mach 3.2
            Engines:2 Pratt  Whittney J-58 (JT11D-20A) with 34,000 lbs. of thrust.
            Range:3,200 nautical miles without refueling
        </documentation>
    </fileheader>

    <metrics>
        <wingarea unit="FT2"> 1795 </wingarea>
        <wingspan unit="FT"> 55.7 </wingspan>
        <chord unit="FT"> 42.12 </chord>
        <htailarea unit="FT2"> 0 </htailarea>
        <htailarm unit="FT"> 0 </htailarm>
        <vtailarea unit="FT2"> 323.1 </vtailarea>
        <vtailarm unit="FT"> 0 </vtailarm>
        <location name="AERORP" unit="IN">
            <x> 0 </x>
            <y> 0 </y>
            <z> 0 </z>
        </location>
        <location name="EYEPOINT" unit="IN">
            <x> -533.46 </x>
            <y> 0 </y>
            <z> 38 </z>
        </location>
        <location name="VRP" unit="IN">
            <x> -430 </x>
            <y> 0 </y>
            <z> 0 </z>
        </location>
    </metrics>

    <mass_balance>
        <ixx unit="SLUG*FT2"> 516572 </ixx>
        <iyy unit="SLUG*FT2"> 2.64484e+06 </iyy>
        <izz unit="SLUG*FT2"> 2.21601e+06 </izz>
        <ixy unit="SLUG*FT2"> 0 </ixy>
        <ixz unit="SLUG*FT2"> 0 </ixz>
        <iyz unit="SLUG*FT2"> 0 </iyz>
        <emptywt unit="LBS"> 59000</emptywt>
        <location name="CG" unit="IN">
            <x> 0 </x>
            <y> 0 </y>
            <z> -32.3 </z>
        </location>
    </mass_balance>

    <ground_reactions>
        <contact type="BOGEY" name="NOSE">
            <location unit="IN">
                <x> -360.23 </x>
                <y> 0 </y>
                <z> -75.98 </z>
            </location>
            <static_friction> 0.8 </static_friction>
            <dynamic_friction> 0.5 </dynamic_friction>
            <rolling_friction> 0.02 </rolling_friction>
            <spring_coeff unit="LBS/FT"> 70000 </spring_coeff>
            <damping_coeff unit="LBS/FT/SEC"> 17000 </damping_coeff>
            <max_steer unit="DEG"> 5 </max_steer>
            <brake_group> NONE </brake_group>
            <retractable>1</retractable>
        </contact>
        <contact type="BOGEY" name="MLG_LEFT">
            <location unit="IN">
                <x> 78.34 </x>
                <y> -54 </y>
                <z> -75.98 </z>
            </location>
            <static_friction> 0.8 </static_friction>
            <dynamic_friction> 0.5 </dynamic_friction>
            <rolling_friction> 0.02 </rolling_friction>
            <spring_coeff unit="LBS/FT"> 170000 </spring_coeff>
            <damping_coeff unit="LBS/FT/SEC"> 34000 </damping_coeff>
            <max_steer unit="DEG"> 0.0 </max_steer>
            <brake_group> LEFT </brake_group>
            <retractable>1</retractable>
        </contact>
        <contact type="BOGEY" name="MLG_RIGHT">
            <location unit="IN">
                <x> 78.34 </x>
                <y> 54 </y>
                <z> -75.98 </z>
            </location>
            <static_friction> 0.8 </static_friction>
            <dynamic_friction> 0.5 </dynamic_friction>
            <rolling_friction> 0.02 </rolling_friction>
            <spring_coeff unit="LBS/FT"> 170000 </spring_coeff>
            <damping_coeff unit="LBS/FT/SEC"> 34000 </damping_coeff>
            <max_steer unit="DEG"> 0.0 </max_steer>
            <brake_group> RIGHT </brake_group>
            <retractable>1</retractable>
        </contact>
        <contact type="BOGEY" name="WT_LEFT">
            <location unit="IN">
                <x> 88.2 </x>
                <y> -257 </y>
                <z> -27 </z>
            </location>
            <static_friction> 0.2 </static_friction>
            <dynamic_friction> 0.2 </dynamic_friction>
            <rolling_friction> 0.2 </rolling_friction>
            <spring_coeff unit="LBS/FT"> 10000 </spring_coeff>
            <damping_coeff unit="LBS/FT/SEC"> 20000 </damping_coeff>
            <max_steer unit="DEG"> 0.0 </max_steer>
            <brake_group> NONE </brake_group>
            <retractable>0</retractable>
        </contact>
        <contact type="BOGEY" name="WT_RIGHT">
            <location unit="IN">
                <x> 88.2 </x>
                <y> 257 </y>
                <z> -27 </z>
            </location>
            <static_friction> 0.2 </static_friction>
            <dynamic_friction> 0.2 </dynamic_friction>
            <rolling_friction> 0.2 </rolling_friction>
            <spring_coeff unit="LBS/FT"> 100000 </spring_coeff>
            <damping_coeff unit="LBS/FT/SEC"> 20000 </damping_coeff>
            <max_steer unit="DEG"> 0.0 </max_steer>
            <brake_group> NONE </brake_group>
            <retractable>0</retractable>
        </contact>
        <contact type="BOGEY" name="VT_LEFT">
            <location unit="IN">
                <x> 227.4 </x>
                <y> -69.7 </y>
                <z> 140.8 </z>
            </location>
            <static_friction> 0.2 </static_friction>
            <dynamic_friction> 0.2 </dynamic_friction>
            <rolling_friction> 0.2 </rolling_friction>
            <spring_coeff unit="LBS/FT"> 100000 </spring_coeff>
            <damping_coeff unit="LBS/FT/SEC"> 20000 </damping_coeff>
            <max_steer unit="DEG"> 0.0 </max_steer>
            <brake_group> NONE </brake_group>
            <retractable>0</retractable>
        </contact>
        <contact type="BOGEY" name="VT_RIGHT">
            <location unit="IN">
                <x> 227.4 </x>
                <y> 69.7 </y>
                <z> 140.8 </z>
            </location>
            <static_friction> 0.2 </static_friction>
            <dynamic_friction> 0.2 </dynamic_friction>
            <rolling_friction> 0.2 </rolling_friction>
            <spring_coeff unit="LBS/FT"> 100000 </spring_coeff>
            <damping_coeff unit="LBS/FT/SEC"> 20000 </damping_coeff>
            <max_steer unit="DEG"> 0.0 </max_steer>
            <brake_group> NONE </brake_group>
            <retractable>0</retractable>
        </contact>
        <contact type="BOGEY" name="RADOME">
            <location unit="IN">
                <x> -468.7 </x>
                <y> 0 </y>
                <z> 0 </z>
            </location>
            <static_friction> 0.2 </static_friction>
            <dynamic_friction> 0.2 </dynamic_friction>
            <rolling_friction> 0.2 </rolling_friction>
            <spring_coeff unit="LBS/FT"> 100000 </spring_coeff>
            <damping_coeff unit="LBS/FT/SEC"> 20000 </damping_coeff>
            <max_steer unit="DEG"> 0.0 </max_steer>
            <brake_group> NONE </brake_group>
            <retractable>0</retractable>
        </contact>
        <contact type="BOGEY" name="BELLY">
            <location unit="IN">
                <x> -7 </x>
                <y> 0 </y>
                <z> -20 </z>
            </location>
            <static_friction> 0.2 </static_friction>
            <dynamic_friction> 0.2 </dynamic_friction>
            <rolling_friction> 0.2 </rolling_friction>
            <spring_coeff unit="LBS/FT"> 100000 </spring_coeff>
            <damping_coeff unit="LBS/FT/SEC"> 20000 </damping_coeff>
            <max_steer unit="DEG"> 0.0 </max_steer>
            <brake_group> NONE </brake_group>
            <retractable>0</retractable>
        </contact>
    </ground_reactions>
    <propulsion>
            <engine file="SR-71_engine">
            <location unit="IN">
                <x> 0 </x>
                <y> -111.4 </y>
                <z> -40 </z>
            </location>
            <orient unit="DEG">
                <roll> 0.0 </roll>
                <pitch> 0 </pitch>
                <yaw> 0 </yaw>
            </orient>
            <feed>0</feed>
            <feed>1</feed>
            <feed>2</feed>
            <thruster file="direct-new">
                <location unit="IN">
                    <x> 0 </x>
                    <y> -111.4 </y>
                    <z> -40 </z>
                </location>
                <orient unit="DEG">
                    <roll> 0.0 </roll>
                    <pitch> 0.0 </pitch>
                    <yaw> 0.0 </yaw>
                </orient>
            </thruster>
        </engine>
        <engine file="SR-71_engine">
            <location unit="IN">
                <x> 0 </x>
                <y> 111.4 </y>
                <z> -40 </z>
            </location>
            <orient unit="DEG">
                <roll> 0.0 </roll>
                <pitch> 0 </pitch>
                <yaw> 0 </yaw>
            </orient>
            <feed>0</feed>
            <feed>1</feed>
            <feed>2</feed>
            <thruster file="direct-new">
                <location unit="IN">
                    <x> 774 </x>
                    <y> 111.4 </y>
                    <z> -40 </z>
                </location>
                <orient unit="DEG">
                    <roll> 0.0 </roll>
                    <pitch> 0.0 </pitch>
                    <yaw> 0.0 </yaw>
                </orient>
            </thruster>
        </engine>
        <tank type="FUEL">    <!-- Tank number 0 -->
            <location unit="IN">
                <x> 0 </x>
                <y> 0 </y>
                <z> -32.25 </z>
            </location>
            <capacity unit="LBS"> 30000 </capacity>
            <contents unit="LBS"> 15000 </contents>
        </tank>
        <tank type="FUEL">    <!-- Tank number 1 -->
            <location unit="IN">
                <x> 0 </x>
                <y> 0 </y>
                <z> -32.25 </z>
            </location>
            <capacity unit="LBS"> 30000 </capacity>
            <contents unit="LBS"> 15000 </contents>
        </tank>
        <tank type="FUEL">    <!-- Tank number 2 -->
            <location unit="IN">
                <x> 0 </x>
                <y> 0 </y>
                <z> -32.25 </z>
            </location>
            <capacity unit="LBS"> 30000 </capacity>
            <contents unit="LBS"> 15000 </contents>
        </tank>
    </propulsion>

    <flight_control name="FCS: SR-71">
        <property>fcs/canopy-cmd-norm</property>
        <property>fcs/canopy-pos-norm</property>
        <property>/controls/flight/probe-refuel</property>
        <property>fcs/refueling-pos-norm</property>
        <property>fcs/chute-cmd-norm</property>
        <property>fcs/chute-pos-norm</property>
        <property>fcs/chute-pos-deg</property>
        <property>fcs/pitch-deg</property>
        <property>sim/model/controls/chute</property>


     <channel name="Pitch">
        <summer name="Pitch Trim Sum">
            <input>fcs/elevator-cmd-norm</input>
            <input>fcs/pitch-trim-cmd-norm</input>
            <clipto>
                <min>-1</min>
                <max>1</max>
            </clipto>
            <output>fcs/elevator-pos-norm</output>
        </summer>

        <aerosurface_scale name="Elevator Control">
            <input>fcs/pitch-trim-sum</input>
            <range>
                <min>-0.35</min>
                <max>0.3</max>
            </range>
            <output>fcs/elevator-pos-rad</output>
        </aerosurface_scale>
    </channel>

    <channel name="Roll">
        <summer name="Roll Trim Sum">
            <input>fcs/aileron-cmd-norm</input>
            <input>fcs/roll-trim-cmd-norm</input>
            <clipto>
                <min>-1</min>
                <max>1</max>
            </clipto>
        </summer>

        <aerosurface_scale name="Left Aileron Control">
            <input>fcs/roll-trim-sum</input>
            <range>
                <min>-0.35</min>
                <max>0.35</max>
            </range>
            <output>fcs/left-aileron-pos-rad</output>
        </aerosurface_scale>

        <aerosurface_scale name="Right Aileron Control">
            <input>-fcs/roll-trim-sum</input>
            <range>
                <min>-0.35</min>
                <max>0.35</max>
            </range>
            <output>fcs/right-aileron-pos-rad</output>
        </aerosurface_scale>
    </channel>
    <channel name="Roll">
        <summer name="Rudder Command Sum">
            <input>fcs/rudder-cmd-norm</input>
            <input>fcs/yaw-trim-cmd-norm</input>
            <clipto>
                <min>-1</min>
                <max>1</max>
            </clipto>
        </summer>

        <scheduled_gain name="Yaw Damper Rate">
            <input>velocities/r-aero-rad_sec</input>
            <table>
                <independentVar>aero/qbar-psf</independentVar>
                <tableData>
                    3.0000    0.0000
                    11.0000    2.0000
                </tableData>
            </table>
        </scheduled_gain>

        <scheduled_gain name="Yaw Damper Beta">
            <input>aero/beta-rad</input>
            <table>
                <independentVar>aero/qbar-psf</independentVar>
                <tableData>
                    3.0000    0.0000
                    11.0000    0.0000
                </tableData>
            </table>
        </scheduled_gain>

        <summer name="Yaw Damper Sum">
            <input>fcs/yaw-damper-beta</input>
            <input>fcs/yaw-damper-rate</input>
            <clipto>
                <min>-0.2000</min>
                <max>0.2000</max>
            </clipto>
        </summer>

        <scheduled_gain name="Yaw Damper Final">
            <input>fcs/yaw-damper-sum</input>
            <table>
                <independentVar>aero/qbar-psf</independentVar>
                <tableData>
                    2.9900    0.0000
                    3.0000    1.0000
                </tableData>
            </table>
        </scheduled_gain>

        <summer name="Rudder Sum">
            <input>fcs/rudder-command-sum</input>
            <input>fcs/yaw-damper-final</input>
            <clipto>
                <min>-1.0000</min>
                <max>1.0000</max>
            </clipto>
        </summer>

        <aerosurface_scale name="Rudder Control">
            <input>fcs/rudder-sum</input>
            <range>
                <min>-0.3500</min>
                <max>0.3500</max>
            </range>
            <output>fcs/rudder-pos-rad</output>
        </aerosurface_scale>
    </channel>
    <channel name="Flaps">
        <kinematic name="Flaps Control">
            <input>fcs/flap-cmd-norm</input>
            <traverse>
                <setting>
                    <position>0.0000</position>
                    <time>0.0000</time>
                </setting>
                <setting>
                    <position>15.0000</position>
                    <time>4.0000</time>
                </setting>
                <setting>
                    <position>30.0000</position>
                    <time>3.0000</time>
                </setting>
            </traverse>
            <output>fcs/flap-pos-deg</output>
        </kinematic>
    </channel>

    <channel name="Landing Gear">
        <kinematic name="Gear Control">
            <input>gear/gear-cmd-norm</input>
            <traverse>
                <setting>
                    <position>0.0000</position>
                    <time>0.0000</time>
                </setting>
                <setting>
                    <position>1.0000</position>
                    <time>5.0000</time>
                </setting>
            </traverse>
            <output>gear/gear-pos-norm</output>
        </kinematic>
    </channel>

    <channel name="Throttle">
            <pure_gain name="Throttle1">
                <input>fcs/throttle-cmd-norm[1]</input>
                <gain>2</gain>
                <output>fcs/throttle-pos-norm[1]</output>
            </pure_gain>
            <pure_gain name="Throttle0">
                <input>fcs/throttle-cmd-norm[0]</input>
                <gain>2</gain>
                <output>fcs/throttle-pos-norm[0]</output>
            </pure_gain>
    </channel>


    <channel name="Canopy">
        <kinematic name="Canopy">
            <input>fcs/canopy-cmd-norm</input>
            <traverse>
                <setting>
                    <position>0.0000</position>
                    <time>0.0000</time>
                </setting>
                <setting>
                    <position>1.0000</position>
                    <time>5.0000</time>
                </setting>
            </traverse>
            <output>fcs/canopy-pos-norm</output>
        </kinematic>
     </channel>

     <channel name="Refuel Probe">


    <kinematic name="Probe Refueling Control">
        <input>/controls/flight/probe-refuel</input>
        <traverse>
            <setting>
                <position>0.0000</position>
                <time>5.0000</time>
            </setting>
            <setting>
                <position>1.0000</position>
                <time>5.0000</time>
            </setting>
        </traverse>
        <output>fcs/refueling-pos-norm</output>
    </kinematic>

     <pure_gain name="Probe Refueling surface">
        <input>fcs/refueling-pos-norm</input>
        <gain>1</gain>
        <output>/surface-positions/refueling-pos-norm</output>
    </pure_gain>

     </channel>

     <channel name="Drag Chute">
        <kinematic name="Chute Control">
            <input>fcs/chute-cmd-norm</input>
            <traverse>
                <setting>
                    <position>0.0000</position>
                    <time>0.0000</time>
                </setting>
                <setting>
                    <position>1.0000</position>
                    <time>3.0000</time>
                </setting>
            </traverse>
            <output>fcs/chute-pos-norm</output>
        </kinematic>

        <pure_gain name="Chute Command">
                <input>/sim/model/controls/chute</input>
                <gain>1</gain>
                <output>fcs/chute-cmd-norm</output>
            </pure_gain>

        <switch name="Brake Chute Deploy">
                <default value="0"/>
                <test  logic="AND" value="1">
                    fcs/chute-pos-norm == 1
                    velocities/vc-kts lt 200
                    velocities/vc-kts gt 50
                    position/h-agl-ft lt  20
                    fcs/throttle-pos-norm  lt 0.1
                </test>
        </switch>


        <!--<pure_gain name="Pitch Deg">
            <input>attitude/pitch-rad</input>
            <gain>57.29578</gain>
            <output>fcs/pitch-deg</output>
        </pure_gain>

        <aerosurface_scale name="Chute Position">
            <input>fcs/pitch-deg</input>
            <range>
                <min>-40</min>
                <max>40</max>
            </range>
            <output>fcs/chute-pos-deg</output>
        </aerosurface_scale>-->

     </channel>


    </flight_control>
    <aerodynamics>
            <function name="aero/function/kCDge">
                    <description>Change_in_drag_due_to_ground_effect</description>
                    <product>
                            <table>
                                    <independentVar>aero/h_b-mac-ft</independentVar>
                                    <tableData>
                                            0.0000    0.8100
                                            0.1000    0.9900
                                            0.1500    0.9500
                                            0.2000    0.9800
                                            0.3000    0.9900
                                            0.4000    1.0000
                                            0.5000    1.0400
                                            0.6000    1.0100
                                            0.7000    0.9900
                                            0.8000    1.0100
                                            0.9000    1.0000
                                            1.0000    1.0000
                                            1.1000    1.0000
                                    </tableData>
                            </table>
                    </product>
            </function>
            <function name="aero/function/kCLge">
            <description>Change_in_lift_due_to_ground_effect</description>
            <product>
                  <table>
                      <independentVar>aero/h_b-mac-ft</independentVar>
                      <tableData>
                          0.0000  1.2290
                          0.1000  1.1240
                          0.1500  1.1160
                          0.2000  1.1240
                          0.3000  1.1050
                          0.4000  1.0410
                          0.5000  1.0340
                          0.6000  1.0190
                          0.7000  1.0080
                          0.8000  1.0030
                          0.9000  1.0010
                          1.0000  1.0000
                          1.1000  1.0000
                      </tableData>
                  </table>
            </product>
        </function>

        <axis name="DRAG">

            <function name="aero/coefficient/CDalpha">
                <description>Drag_due_to_alpha</description>
                <product>
                    <property>aero/qbar-psf</property>
                    <property>metrics/Sw-sqft</property>
                    <property>aero/function/kCDge</property>
                      <table>
                          <independentVar lookup="row">aero/alpha-rad</independentVar>
                          <independentVar lookup="column">velocities/mach</independentVar>
                          <tableData>
                                  0.5000    1.4000
                              -0.4190    0.3800    0.0970
                              -0.2790    0.2200    0.0250
                              -0.1400    0.0700    0.0180
                              -0.0700    0.0400    0.0100
                              0.0000    0.0147    0.0074
                              0.0700    0.0400    0.0100
                              0.1400    0.0700    0.0180
                              0.2790    0.2200    0.0250
                              0.4190    0.3800    0.0970
                              0.5590    0.8000    0.2030
                              0.6980    1.0100    0.2570
                          </tableData>
                      </table>
                </product>
            </function>
            <function name="aero/coefficient/CDi">
                <description>Drag_induced</description>
                <product>
                    <property>aero/qbar-psf</property>
                    <property>metrics/Sw-sqft</property>
                    <property>aero/function/kCDge</property>
                      <table>
                          <independentVar>aero/alpha-rad</independentVar>
                          <tableData>
                              -0.3490    0.2270
                              -0.2620    0.0670
                              -0.1750    0.0480
                              -0.0870    0.0060
                              0.0000    0.0060
                              0.0700    0.0130
                              0.1400    0.0200
                              0.2090    0.0470
                              0.2790    0.0670
                              0.3490    0.2120
                              0.4190    0.2270
                              0.4890    0.3310
                              0.5590    0.4740
                              0.6980    0.2120
                              0.7850    0.9130
                              0.8730    0.7210
                          </tableData>
                      </table>
                </product>
            </function>


            <function name="aero/coefficient/CDgear">
                <description>Drag_due_to_gear</description>
                <product>
                    <property>aero/qbar-psf</property>
                    <property>metrics/Sw-sqft</property>
                    <property>gear/gear-pos-norm</property>
                    <value>0.0200</value>
                </product>
            </function>

            <function name="aero/coefficient/CDsb">
                <description>Drag_due_to_Chute</description>
                <product>
                    <property>aero/qbar-psf</property>
                    <property>metrics/Sw-sqft</property>
                    <property>fcs/brake-chute-deploy</property>
                    <value>0.2</value>
                </product>
            </function>

            <function name="aero/coefficient/CDbeta">
                <description>Drag_due_to_sideslip</description>
                <product>
                    <property>aero/qbar-psf</property>
                    <property>metrics/Sw-sqft</property>
                      <table>
                          <independentVar>aero/beta-rad</independentVar>
                          <tableData>
                              -1.5700    1.2300
                              -0.2600    0.0500
                              0.0000    0.0000
                              0.2600    0.0500
                              1.5700    1.2300
                          </tableData>
                      </table>
                </product>
            </function>
            <function name="aero/coefficient/CDde">
                <description>Drag_due_to_Elevator_Deflection</description>
                <product>
                    <property>aero/qbar-psf</property>
                    <property>metrics/Sw-sqft</property>
                    <property>fcs/elevator-pos-norm</property>
                    <value>0.0750</value>
                </product>
            </function>
        </axis>

        <axis name="SIDE">
            <function name="aero/coefficient/CYb">
                <description>Side_force_due_to_beta</description>
                <product>
                    <property>aero/qbar-psf</property>
                    <property>metrics/Sw-sqft</property>
                    <property>aero/beta-rad</property>
                    <value>-1.0000</value>
                </product>
            </function>
        </axis>

        <axis name="LIFT">
            <function name="aero/coefficient/CLalpha">
                <description>Lift_due_to_alpha</description>
                <product>
                    <property>aero/qbar-psf</property>
                    <property>metrics/Sw-sqft</property>
                    <property>aero/function/kCLge</property>
                      <table>
                          <independentVar>aero/alpha-rad</independentVar>
                          <tableData>
                                -0.2443460 -1.03860
                                -0.1745329 -0.880907
                                -0.1047197 -0.551318
                                -0.0349065 -0.216206
                                0.0349065  0.154461
                                0.1047197  0.560857
                                0.1745329  0.951575
                                0.2443460  1.24168
                                0.3141592  1.39786
                                0.3839724  1.53103
                                0.4537856  1.64110
                                0.5235987  1.77724
                                0.5934119  1.88652
                                0.6632251  1.88940
                                0.7330382  1.80975
                                0.8028514  1.68556
                                0.8726646  1.57524
                                0.9424777  1.46011
                                1.0122909  1.31884
                                1.0821041  1.17117
                                1.1519173  1.02151
                                1.2217304  0.858875
                                1.2915436  0.685334
                                1.3613568  0.529482
                                1.4311699  0.378268
                                1.5009831  0.229349
                                1.5707963  0.0910933
                          </tableData>
                      </table>
                </product>
            </function>
            <function name="aero/coefficient/CLqalpha">
                <description>Lift_due_to_alpha_and_pitch_rate</description>
                <product>
                    <property>aero/qbar-psf</property>
                    <property>metrics/Sw-sqft</property>
                    <property>aero/ci2vel</property>
                    <property>velocities/q-aero-rad_sec</property>
                      <table>
                          <independentVar>aero/alpha-rad</independentVar>
                          <tableData>
                                -0.2443460 4.51
                                -0.1745329 4.51
                                -0.1047197 4.51
                                -0.0349065 4.5175
                                0.0349065 4.3825
                                0.1047197 3.9625
                                0.1745329 3.63
                                0.2443460 3.4325
                                0.3141592 3.375
                                0.3839724 3.47
                                0.4537856 3.6025
                                0.5235987 3.9625
                                0.5934119 5.095
                                0.6632251 6.875
                                0.7330382 8.47
                                0.8028514 9.15
                                0.8726646 7.55
                                0.9424777 5.95
                                1.0122909 5.28
                                1.0821041 5.04
                                1.1519173 4.95
                                1.2217304 4.95
                                1.2915436 4.87
                                1.3613568 4.73
                                1.4311699 4.57
                                1.5009831 4.39
                                1.5707963 4.15
                          </tableData>
                      </table>
                </product>
            </function>

            <function name="aero/coefficient/CLde">
                <description>Lift_due_to_Elevator_Deflection</description>
                <product>
                    <property>aero/qbar-psf</property>
                    <property>metrics/Sw-sqft</property>
                    <property>fcs/elevator-pos-rad</property>
                    <value>0.2000</value>
                </product>
            </function>
        </axis>

        <axis name="ROLL">
            <function name="aero/coefficient/Clb">
                <description>Roll_moment_due_to_beta</description>
                <product>
                    <property>aero/qbar-psf</property>
                    <property>metrics/Sw-sqft</property>
                    <property>metrics/bw-ft</property>
                    <property>aero/beta-rad</property>
                    <value>-0.1000</value>
                </product>
            </function>
            <function name="aero/coefficient/Clp">
                <description>Roll_moment_due_to_roll_rate</description>
                <product>
                    <property>aero/qbar-psf</property>
                    <property>metrics/Sw-sqft</property>
                    <property>metrics/bw-ft</property>
                    <property>aero/bi2vel</property>
                    <property>velocities/p-aero-rad_sec</property>
                    <value>-0.4000</value>
                </product>
            </function>
            <function name="aero/coefficient/Clr">
                <description>Roll_moment_due_to_yaw_rate</description>
                <product>
                    <property>aero/qbar-psf</property>
                    <property>metrics/Sw-sqft</property>
                    <property>metrics/bw-ft</property>
                    <property>aero/bi2vel</property>
                    <property>velocities/r-aero-rad_sec</property>
                    <value>0.1500</value>
                </product>
            </function>
            <function name="aero/coefficient/Clda">
                <description>Roll_moment_due_to_aileron</description>
                <product>
                    <property>aero/qbar-psf</property>
                    <property>metrics/Sw-sqft</property>
                    <property>metrics/bw-ft</property>
                    <property>fcs/left-aileron-pos-rad</property>
                      <table>
                          <independentVar>velocities/mach</independentVar>
                          <tableData>
                              0.0000    0.1200
                              2.0000    0.0400
                          </tableData>
                      </table>
                </product>
            </function>
            <function name="aero/coefficient/Cldr">
                <description>Roll_moment_due_to_rudder</description>
                <product>
                    <property>aero/qbar-psf</property>
                    <property>metrics/Sw-sqft</property>
                    <property>metrics/bw-ft</property>
                    <property>fcs/rudder-pos-rad</property>
                    <value>0.0100</value>
                </product>
            </function>
        </axis>

        <axis name="PITCH">
            <function name="aero/coefficient/Cmalpha">
                <description>Pitch_moment_due_to_alpha</description>
                <product>
                    <property>aero/qbar-psf</property>
                    <property>metrics/Sw-sqft</property>
                    <property>metrics/cbarw-ft</property>
                    <property>aero/alpha-rad</property>
                    <value>-0.3000</value>
                </product>
            </function>
            <function name="aero/coefficient/Cmde">
                <description>Pitch_moment_due_to_elevator</description>
                <product>
                    <property>aero/qbar-psf</property>
                    <property>metrics/Sw-sqft</property>
                    <property>metrics/cbarw-ft</property>
                    <property>fcs/elevator-pos-rad</property>
                      <table>
                          <independentVar>velocities/mach</independentVar>
                          <tableData>
                              0.0000    -0.8000
                              2.0000    -0.2000
                          </tableData>
                      </table>
                </product>
            </function>
            <function name="aero/coefficient/Cmq">
                <description>Pitch_moment_due_to_pitch_rate</description>
                <product>
                    <property>aero/qbar-psf</property>
                    <property>metrics/Sw-sqft</property>
                    <property>metrics/cbarw-ft</property>
                    <property>aero/ci2vel</property>
                    <property>velocities/q-aero-rad_sec</property>
                    <value>-18.0000</value>
                </product>
            </function>
            <function name="aero/coefficient/Cmadot">
                <description>Pitch_moment_due_to_alpha_rate</description>
                <product>
                    <property>aero/qbar-psf</property>
                    <property>metrics/Sw-sqft</property>
                    <property>metrics/cbarw-ft</property>
                    <property>aero/ci2vel</property>
                    <property>aero/alphadot-rad_sec</property>
                    <value>-9.0000</value>
                </product>
            </function>
        </axis>

        <axis name="YAW">
            <function name="aero/coefficient/Cnb">
                <description>Yaw_moment_due_to_beta</description>
                <product>
                    <property>aero/qbar-psf</property>
                    <property>metrics/Sw-sqft</property>
                    <property>metrics/bw-ft</property>
                    <property>aero/beta-rad</property>
                    <value>0.1200</value>
                </product>
            </function>
            <function name="aero/coefficient/Cnr">
                <description>Yaw_moment_due_to_yaw_rate</description>
                <product>
                    <property>aero/qbar-psf</property>
                    <property>metrics/Sw-sqft</property>
                    <property>metrics/bw-ft</property>
                    <property>aero/bi2vel</property>
                    <property>velocities/r-aero-rad_sec</property>
                    <value>-0.1500</value>
                </product>
            </function>
            <function name="aero/coefficient/Cndr">
                <description>Yaw_moment_due_to_rudder</description>
                <product>
                    <property>aero/qbar-psf</property>
                    <property>metrics/Sw-sqft</property>
                    <property>metrics/bw-ft</property>
                    <property>fcs/rudder-pos-rad</property>
                    <value>-0.1000</value>
                </product>
            </function>
            <function name="aero/coefficient/Cnda">
                <description>Adverse_yaw</description>
                <product>
                    <property>aero/qbar-psf</property>
                    <property>metrics/Sw-sqft</property>
                    <property>metrics/bw-ft</property>
                    <property>fcs/left-aileron-pos-rad</property>
                    <value>0.0000</value>
                </product>
            </function>
        </axis>
    </aerodynamics>
</fdm_config>
